// SBML level 2 version 4

function Mass_action___2__irreversible(k, A, B)
  k*A*B;
end
Mass_action___2__irreversible is "Mass action - 2 (irreversible)";

function Production_rate_with_Shifted_Hill_function(A_0, I, I_0, n, lambda_A)
  A_0*(1/(1 + (I/I_0)^n) + lambda_A*(I/I_0)^n/(1 + (I/I_0)^n));
end

model New_Model_1()

  // Compartments:
  compartment compartment = 1;

  // Species:
  species N in compartment = 1000;
  species D in compartment = 1000;
  species J in compartment = 1000;
  species I in compartment = 200;
  species Dext in compartment = 1000;
  species Jext in compartment = 1000;
  species Next in compartment = 1000;
  species $Dext_Jext in compartment;

  // Parameters:
  kc = 5*10^(-4)/60;
  kt = 5*10^(-5)/60;
  I_0 = 200;
  N_0 = 1400/60;
  D_0 = 1600/60;
  J_0 = 1200/60;
  lambda_N = 2;
  lambda_J = 2;
  lambda_D = 0;
  n_N = 2;
  n_D = 2;
  n_J = 5;

  // Assignment rules:
  Dext_Jext := Dext + Jext;
  gamma := 0.1/60;
  gamma_I := 0.5/60;

  // Reactions:
  N_deg: N => ; compartment*gamma*N; N_deg is "Notch degradation";
  D_deg: D => ; compartment*gamma*D; D_deg is "Delta degradation";
  J_deg: J => ; compartment*gamma*J; J_deg is "Jagged degradation";
  I_deg: I => ; compartment*gamma_I*I; I_deg is "NICD degradation";
  N___D_consumption: N + D => ; compartment*kc*N*D; N___D_consumption is "Notch & Delta cis-inhibition";
  N___J_consumption: N + J => ; compartment*kc*N*J; N___J_consumption is "Notch & Jagged cis-inhibition";
  N_going_to_I: N => I; compartment*Mass_action___2__irreversible(kt, Dext_Jext, N); N_going_to_I is "NICD formation from Notch";  // modifiers: Dext_Jext
  D_Next_reaction: D => ; compartment*Mass_action___2__irreversible(kt, Next, D); D_Next_reaction is "Delta & Notch_ext trans-activation";  // modifiers: Next
  J_Next_reaction: J => ; compartment*Mass_action___2__irreversible(kt, Next, J); J_Next_reaction is "Jagged & Notch_ext trans-activation";  // modifiers: Next
  N_formation_hill: => N; compartment*Production_rate_with_Shifted_Hill_function(N_0, I, I_0, n_N, lambda_N); N_formation_hill is "Notch formation";  // modifiers: I
  D_formation_hill: => D; compartment*Production_rate_with_Shifted_Hill_function(D_0, I, I_0, n_D, lambda_D); D_formation_hill is "Delta formation";  // modifiers: I
  J_formation_hill: => J; compartment*Production_rate_with_Shifted_Hill_function(J_0, I, I_0, n_J, lambda_J); J_formation_hill is "Jagged formation";  // modifiers: I

  // Unit definitions:
  unit length = 1e-6 metre;
  unit area = (1e-6 metre)^2;
  unit volume = 1e-3 litre;
  unit time = 0.06 second;
  unit substance = item;
end
