// SBML level 2 version 4

function mass_action_irrev___extra_modifier_1_0(D, Next, kt)
  kt*D*Next;
end
mass_action_irrev___extra_modifier_1_0 is "mass action irrev - extra modifier_1";

function mass_action_irrev___extra_modifier_2_0(J, Next, kt)
  kt*J*Next;
end
mass_action_irrev___extra_modifier_2_0 is "mass action irrev - extra modifier_2";

function mass_action_irrev_2_rate_const__1_0(Dext_Jext, N, kt)
  kt*Dext_Jext*N;
end
mass_action_irrev_2_rate_const__1_0 is "mass action irrev 2 rate const._1";

function Hs_2_0(D_0, I, I_0, lambda_D, n_D)
  D_0*(1/(1 + (I/I_0)^n_D) + lambda_D*(I/I_0)^n_D/(1 + (I/I_0)^n_D));
end

function Hs_3_0(I, I_0, J_0, lambda_J, n_J)
  J_0*(1/(1 + (I/I_0)^n_J) + lambda_J*(I/I_0)^n_J/(1 + (I/I_0)^n_J));
end

function Hs_1_0(I, I_0, N_0, lambda_N, n_N)
  N_0*(1/(1 + (I/I_0)^n_N) + lambda_N*(I/I_0)^n_N/(1 + (I/I_0)^n_N));
end

model New_Model_1()
  // New Model_1_1

  // Compartments:
  compartment compartment = 1;

  // Species:
  species N in compartment = 1000;
  species D in compartment = 1000;
  species J in compartment = 1000;
  species I in compartment = 200;
  species Dext in compartment = 1000;
  species Jext in compartment = 1000;
  species Next in compartment = 1000;

  // Parameters:
  gamma = 0.1 unit_0;
  gamma_I = 0.5 unit_0;
  kc = 0.0005;
  var Dext_Jext; Dext_Jext is "Dext+Jext";
  kt = 5e-5;
  I_0 = 200;
  N_0 = 1400;
  D_0 = 1240;
  J_0 = 940;
  lambda_N = 2;
  lambda_J = 2;
  lambda_D = 0;
  n_N = 2;
  n_D = 2;
  n_J = 5;

  // Assignment rules:
  Dext_Jext := Dext + Jext;

  // Reactions:
  N_deg: N => ; compartment*gamma*N;
  D_deg: D => ; compartment*gamma*D;
  J_deg: J => ; compartment*gamma*J;
  I_deg: I => ; compartment*gamma_I*I;
  N___D_consumption: N + D => ; compartment*kc*N*D; N___D_consumption is "N & D consumption";
  N___J_consumption: N + J => ; compartment*kc*N*J; N___J_consumption is "N & J consumption";
  N_going_to_I: N => I; compartment*mass_action_irrev_2_rate_const__1_0(Dext_Jext, N, kt);
  D_Next_reaction: D => ; compartment*mass_action_irrev___extra_modifier_1_0(D, Next, kt); D_Next_reaction is "D-Next reaction";  // modifiers: Next
  J_Next_reaction: J => ; compartment*mass_action_irrev___extra_modifier_2_0(J, Next, kt); J_Next_reaction is "J-Next reaction";  // modifiers: Next
  N_formation_hill: => N; compartment*Hs_1_0(I, I_0, N_0, lambda_N, n_N);  // modifiers: I
  D_formation_hill: => D; compartment*Hs_2_0(D_0, I, I_0, lambda_D, n_D);  // modifiers: I
  J_formation_hill: => J; compartment*Hs_3_0(I, I_0, J_0, lambda_J, n_J);  // modifiers: I

  // Unit definitions:
  unit substance = item;
  unit unit_0 = 1 / (0.06 second); unit_0 is "1/mmin";
  unit length = 1e-6 metre;
  unit area = (1e-6 metre)^2;
  unit volume = 1e-3 litre;
  unit time = 0.06 second;
end
