// SBML level 2 version 4

function mass_action_irrev_2_rate_const(k1, k2, substrate)
  k1*k2*substrate;
end
mass_action_irrev_2_rate_const is "mass action irrev 2 rate const.";

function mass_action_irrev___extra_modifier(k1, substrate, modifier)
  k1*substrate*modifier;
end
mass_action_irrev___extra_modifier is "mass action irrev - extra modifier";

function Hs(Y_0, X, X_0, hillcoeff, lambda)
  Y_0*(1/(1 + (X/X_0)^hillcoeff) + lambda*(X/X_0)^hillcoeff/(1 + (X/X_0)^hillcoeff));
end

model New_Model()

  // Compartments:
  compartment compartment = 1;

  // Species:
  species N in compartment = 1000;
  species D in compartment = 1000;
  species J in compartment = 1000;
  species I in compartment = 200;
  species Dext in compartment = 1000;
  species Jext in compartment = 1000;
  species Next in compartment = 1000;

  // Parameters:
  gamma = 0.001667 unit_0;
  gamma_I = 0.00833 unit_0;
  kc = 8.33e-6;
  var Dext_Jext; Dext_Jext is "Dext+Jext";
  kt = 8.33e-7;
  I_0 = 200;
  N_0 = 26.67;
  D_0 = 30;
  J_0 = 20;
  lambda_N = 2;
  lambda_J = 2;
  lambda_D = 0;
  n_N = 2;
  n_D = 2;
  n_J = 5;

  // Assignment rules:
  Dext_Jext := Dext + Jext;

  // Reactions:
  N_deg: N => ; compartment*gamma*N;
  D_deg: D => ; compartment*gamma*D;
  J_deg: J => ; compartment*gamma*J;
  I_deg: I => ; compartment*gamma_I*I;
  N___D_consumption: N + D => ; compartment*kc*N*D; N___D_consumption is "N & D consumption";
  N___J_consumption: N + J => ; compartment*kc*N*J; N___J_consumption is "N & J consumption";
  N_going_to_I: N => I; compartment*mass_action_irrev_2_rate_const(kt, Dext_Jext, N);
  D_Next_reaction: D => ; compartment*mass_action_irrev___extra_modifier(kt, D, Next); D_Next_reaction is "D-Next reaction";  // modifiers: Next
  J_Next_reaction: J => ; compartment*mass_action_irrev___extra_modifier(kt, J, Next); J_Next_reaction is "J-Next reaction";  // modifiers: Next
  N_formation_hill: => N; compartment*Hs(N_0, I, I_0, n_N, lambda_N);  // modifiers: I
  D_formation_hill: => D; compartment*Hs(D_0, I, I_0, n_D, lambda_D);  // modifiers: I
  J_formation_hill: => J; compartment*Hs(J_0, I, I_0, n_J, lambda_J);  // modifiers: I

  // Unit definitions:
  unit length = 1e-6 metre;
  unit area = (1e-6 metre)^2;
  unit volume = 1e-3 litre;
  unit time = 60 second;
  unit substance = item;
  unit unit_0 = 1 / (0.06 second); unit_0 is "min^-1";
end
